*Heading
** Job name: Job-roof_shell Model name: Model-1
** Generated by: Abaqus/CAE 6.14-4
*Preprint, echo=NO, model=NO, history=NO, contact=NO
**
** PARTS
**
*Part, name=cycloid_hypotro
*Node
1,3.88912654,0.7561534444742883,-3.88855147
2,0.000154038687,6.181370281468247e-10,3.15842371e-05
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*Element, type=S3
   1, 2721, 2404, 2702
   2, 2630, 2424, 2443
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*Nset, nset=_PickedSet23, internal, generate
     1,  34982,      1
*Elset, elset=_PickedSet23, internal, generate
     1,  69290,      1
** Section: Section-1
*Shell Section, elset=_PickedSet23, material=Material-1
0.5, 5
*End Part
**
**
** ASSEMBLY
**
*Assembly, name=Assembly
**
*Instance, name=cycloid_hypotro-1, part=cycloid_hypotro
*End Instance
**
*Nset, nset=_PickedSet4, internal, instance=cycloid_hypotro-1
 1, 4, 6, 8
*Nset, nset=_PickedSet6, internal, instance=cycloid_hypotro-1
 2,
*End Assembly
**
** MATERIALS
**
*Material, name=Material-1
*Elastic
210000., 0.3
**
** BOUNDARY CONDITIONS
**
** Name: BC-1 Type: Symmetry/Antisymmetry/Encastre
*Boundary
_PickedSet4, ENCASTRE
** ----------------------------------------------------------------
**
** STEP: Step-1
**
*Step, name=Step-1, nlgeom=NO
*Static
1., 1., 1e-05, 1.
**
** LOADS
**
** Name: Load-1   Type: Concentrated force
*Cload
_PickedSet6, 2, -100.
**
** OUTPUT REQUESTS
**
*Restart, write, frequency=0
**
** FIELD OUTPUT: F-Output-1
**
*Output, field
*Node Output
U,
*Element Output, directions=YES
E, ELSE, EVOL, MISES, S
**
** HISTORY OUTPUT: H-Output-1
**
*Output, history, variable=PRESELECT
*End Step
